// COMSOL Multiphysics 5.2.0.166 model "Ass1_Comsol_state12.mph"
// Outline of the model tree

Parameters
  d0 = 0.1 [m]
  S = 0.5 [m]
  V0 = 1[V]
  eps0 = epsilon0_const

Functions
  an1: Analytic | expr = x; args = x

Variables
  var1 "Variables 1"
    Ca = eps0*S/d0
    C1 = 2*es.intWe/(1[m]*V0^2)
    C2 = intop1(es.nD)/V0
    err_a1 = abs((Ca-C1))/(Ca+C1)
    err_a2 = abs((Ca-C2))/(Ca+C2)

Couplings
  intop1: Integration on boundaries 4-10, 12

Geometry
  geom1 "Geometry 1" (2D, length unit m)
    r1: Rectangle | base = center; size = {1, .8}
    r2: Rectangle "rup" | pos = {-0.25, d0/2}; size = {S, 0.01}
    mir1: Mirror "rdown" | input = r2; keep = on; pos = {0, 0}; axis = {0, 1}
    fin: Finalize "Form Union"

Materials
  mat1: Common "Copper" on domains 2, 3
    def "Basic"
      relpermeability = 1
      electricconductivity = 5.998e7[S/m]
      thermalexpansioncoefficient = 17e-6[1/K]
      heatcapacity = 385[J/(kg*K)]
      relpermittivity = 1
      density = 8960[kg/m^3]
      thermalconductivity = 400[W/(m*K)]
    Enu "Young's modulus and Poisson's ratio"
      youngsmodulus = 110e9[Pa]
      poissonsratio = 0.35
    linzRes "Linearized resistivity"
      rho0 = 1.72e-8[ohm*m]
      alpha = 0.0039[1/K]
      Tref = 298[K]
  mat2: Common "Air" on domains 1
    def "Basic"
      relpermeability = 1
      relpermittivity = 1
      dynamicviscosity = eta(T[1/K])[Pa*s]
      ratioofspecificheat = 1.4
      electricconductivity = 0[S/m]
      heatcapacity = Cp(T[1/K])[J/(kg*K)]
      density = rho(pA[1/Pa],T[1/K])[kg/m^3]
      thermalconductivity = k(T[1/K])[W/(m*K)]
      soundspeed = cs(T[1/K])[m/s]
      eta: Piecewise | arg = T; extrap = constant; pieces = {200.0, 1600.0, -8.38278E-7+8.35717342E-8*T^1-7.69429583E-11*T^2+4.6437266E-14*T^3-1.06585607E-17*T^4}
      Cp: Piecewise | arg = T; extrap = constant; pieces = {200.0, 1600.0, 1047.63657-0.372589265*T^1+9.45304214E-4*T^2-6.02409443E-7*T^3+1.2858961E-10*T^4}
      rho: Analytic | expr = pA*0.02897/8.314/T; args = {pA, T}; dermethod = manual; argders = {{pA, d(pA*0.02897/8.314/T,pA)}, {T, d(pA*0.02897/8.314/T,T)}}
      k: Piecewise | arg = T; extrap = constant; pieces = {200.0, 1600.0, -0.00227583562+1.15480022E-4*T^1-7.90252856E-8*T^2+4.11702505E-11*T^3-7.43864331E-15*T^4}
      cs: Analytic | expr = sqrt(1.4*287*T); args = T; dermethod = manual; argders = {T, d(sqrt(1.4*287*T),T)}
    RefractiveIndex
      n = 1
      ki = 0

Physics
  es: Electrostatics on all domains
    dependent variable V
    ccn1: ChargeConservation (default)
    zc1: ZeroCharge (default)
    init1: init "Initial Values 1" (default)
    pot1: ElectricPotential "Electric Pot 0" on boundaries 4-6, 10
    pot2: ElectricPotential "Electric Pot 100" on boundaries 7-9, 12 | V0 = 100

Mesh
  mesh1 "Mesh1 normal" (physics-controlled)
    size: MeshSizeDefault | hauto = 3

Studies
  std1 "Study 1"
    param: Parametric "Parametric Sweep" | pname = d0; plistarr = 0.001 0.1 0.2 0.4 .6 .8
    stat: Stationary

Solver configurations
  sol1 "Solution 1" (study std1)
    v1: Variables "Dependent Variables 1"
    s1: Stationary "Stationary Solver 1"
      dDef: Direct
      fc1: FullyCoupled | linsolver = dDef
  sol2 "Parametric Solutions 1" (study std1)

Datasets
  dset1: Solution | solution = sol1
  dset2: Solution | solution = sol2

Derived values
  gev1: EvalGlobal "Global Evaluation 1" | data = dset2; table = tbl1; expr = err_a2

Tables
  tbl1: Table
    // Global Evaluation 1 (Ca)
    d0 | err_a1 (1) | err_a2 (1)
    0.001 | 0.999802 | 0.999769
    0.1 | 0.999842 | 1.06
    0.2 | 0.999859 | 1.17878
    0.4 | 0.999874 | 1.04842
    0.6 | 0.999879 | 1.67397
    0.8 | 0.999873 | 1.07057

Plots
  pg1: PlotGroup2D "Electric Potential (es)" | data = dset2
    surf1: Surface | expr = V
    str1: Streamline | data = dset2; expr = {es.Ex, es.Ey}; udist = 0.02
  pg2: PlotGroup2D "Electric Potential (es) 1" | data = dset2
    surf1: Surface | expr = V
  pg3: PlotGroup1D "1D Plot Group 3" | data = none
    tblp1: Table "Table Graph 1" | table = tbl1; xaxisdata = auto
  pg4: PlotGroup2D "Electric Potential (es) 2" | data = dset1
    surf1: Surface | data = dset2; expr = V