// COMSOL Multiphysics 5.2.0.166 model "ass2.mph"
// Outline of the model tree

Parameters
  a = 0.2[m]
  n = 1000[1/m]
  l = 0.1[m]
  K = n*I
  my0 = 4*pi*10^-7[H/m]
  I = 1[A]
  S = pi*a^2
  alpha = a/l

Probes
  pdom1: DomainPoint "Domain Point Probe 1" | frame = spatial
    ppb1: PointExpr "Point Probe Expression 1" | expr = 2*pi*Aphi*alpha/(my0*I*n*l); table = tbl2
    ppb2: PointExpr "Point Probe Expression 2" | expr = pi*alpha^2; table = tbl2

Geometry
  geom1 "Geometry 1" (2D axisymmetric, length unit m)
    r1: Rectangle | pos = {0, -1.5}; size = {2, 3}
    r2: Rectangle | pos = {0, -l/2}; size = {a, l}
    co1: Compose | input = r1, r2; keep = on; intbnd = on; formula = r1+r2
    fin: Finalize "Form Union"

Materials
  mat1: Common "Copper" on domains 2
    def "Basic"
      relpermeability = 1
      electricconductivity = 5.998e7[S/m]
      thermalexpansioncoefficient = 17e-6[1/K]
      heatcapacity = 385[J/(kg*K)]
      relpermittivity = 1
      density = 8960[kg/m^3]
      thermalconductivity = 400[W/(m*K)]
    Enu "Young's modulus and Poisson's ratio"
      youngsmodulus = 110e9[Pa]
      poissonsratio = 0.35
    linzRes "Linearized resistivity"
      rho0 = 1.72e-8[ohm*m]
      alpha = 0.0039[1/K]
      Tref = 298[K]
  mat2: Common "Air" on domains 1
    def "Basic"
      relpermeability = 1
      relpermittivity = 1
      dynamicviscosity = eta(T[1/K])[Pa*s]
      ratioofspecificheat = 1.4
      electricconductivity = 0[S/m]
      heatcapacity = Cp(T[1/K])[J/(kg*K)]
      density = rho(pA[1/Pa],T[1/K])[kg/m^3]
      thermalconductivity = k(T[1/K])[W/(m*K)]
      soundspeed = cs(T[1/K])[m/s]
      eta: Piecewise | arg = T; extrap = constant; pieces = {200.0, 1600.0, -8.38278E-7+8.35717342E-8*T^1-7.69429583E-11*T^2+4.6437266E-14*T^3-1.06585607E-17*T^4}
      Cp: Piecewise | arg = T; extrap = constant; pieces = {200.0, 1600.0, 1047.63657-0.372589265*T^1+9.45304214E-4*T^2-6.02409443E-7*T^3+1.2858961E-10*T^4}
      rho: Analytic | expr = pA*0.02897/8.314/T; args = {pA, T}; dermethod = manual; argders = {{pA, d(pA*0.02897/8.314/T,pA)}, {T, d(pA*0.02897/8.314/T,T)}}
      k: Piecewise | arg = T; extrap = constant; pieces = {200.0, 1600.0, -0.00227583562+1.15480022E-4*T^1-7.90252856E-8*T^2+4.11702505E-11*T^3-7.43864331E-15*T^4}
      cs: Analytic | expr = sqrt(1.4*287*T); args = T; dermethod = manual; argders = {T, d(sqrt(1.4*287*T),T)}
    RefractiveIndex
      n = 1
      ki = 0

Physics
  mf: InductionCurrents "Magnetic Fields" on all domains
    dependent variable A = {Ar, Aphi, Az}
    al1: AmperesLaw "Ampère's Law 1" (default)
      sigma_mat = from_mat
      epsilonr_mat = userdef
      epsilonr = 1
      mur_mat = userdef
      mur = 1
    axi1: AxialSymmetry (default)
    mi1: MagneticInsulation (default)
    init1: init "Initial Values 1" (default)
    scu1: SurfaceCurrent on boundaries 8 | Js0 = {0, K, 0}
    mp1: MagneticPotential on boundaries 2, 7, 9

Mesh
  mesh1 "Mesh 1" (physics-controlled)
    size: MeshSizeDefault | hauto = 3

Studies
  std1 "Study 1"
    param: Parametric "Parametric Sweep" | sweeptype = filled; pname = alpha; plistarr = range(0.01,.005,.1)
    stat: Stationary

Solver configurations
  sol1 "Solution 1" (study std1)
    v1: Variables "Dependent Variables 1"
    s1: Stationary "Stationary Solver 1"
      dDef: Direct
      p1: Parametric | sweeptype = filled; pname = alpha; plistarr = range(0.01,.005,.1); pcontinuationmode = no
      fc1: FullyCoupled | linsolver = dDef

Datasets
  dset1: Solution | solution = sol1
  rev1: Revolve2D "Revolution 2D 1" | data = dset1; genpoints = {{0, 0}, {0, 1}}; startangle = -90; revangle = 225
  cln1: CutLine2D | data = dset1; method = twopoint; genpoints = {{0, 0}, {2, 0}}
  dset2: Solution "Probe Solution 2" | solution = sol1
  cpt1: CutPoint2D "Domain Point Probe 1" | data = dset2; pointx = a
  dset3: Solution "Probe Solution 3" | solution = sol1
  dset4: Solution "Probe Solution 4" | solution = sol1

Derived values
  pev1: EvalPoint "Point Probe Expression 2" | data = cpt1; table = tbl2; expr = pi*alpha^2
  pev2: EvalPoint "Point Probe Expression 1" | data = cpt1; table = tbl2; expr = 2*pi*Aphi*alpha/(my0*I*n*l)

Tables
  tbl1: Table
    // Global Evaluation 1 (PHItot)
    2*pi*a*ppb1*n*l (Wb/m) | PHItot (Wb) | PHItot (Wb)
    0.00854538 | 0.000607697 | 0.000607697
  tbl2: Table "Probe Table 2"
    alpha | pi*alpha^2 (1), Point: (0.2, 0) | 2*pi*Aphi*alpha/(my0*I*n*l) (1), Point: (0.2, 0)
    0.01 | 0.000314159 | 0.0241795
    0.015 | 0.000706858 | 0.0362693
    0.02 | 0.00125664 | 0.048359
    0.025 | 0.0019635 | 0.0604488
    0.03 | 0.00282743 | 0.0725385
    0.035 | 0.00384845 | 0.0846283
    0.04 | 0.00502655 | 0.0967181
    0.045 | 0.00636173 | 0.108808
    0.05 | 0.00785398 | 0.120898
    0.055 | 0.00950332 | 0.132987
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
Plots
  pg1: PlotGroup2D "Magnetic Flux Density Norm (mf)" | data = dset1
    surf1: Surface | expr = mf.normB
    str1: Streamline | expr = {mf.Br, mf.Bz}; udist = 0.04; linetype = line
  pg2: PlotGroup3D "Magnetic Flux Density Norm, Revolved Geometry (mf)" | data = rev1
    surf1: Surface | expr = mf.normB
  pg3: PlotGroup1D "1D Plot Group 3" | data = dset1
    lngr1: LineGraph | data = cln1; cutmode = off; expr = Aphi; xdata = arc
  pg4: PlotGroup1D "Probe Plot Group 4"
    tblp1: Table "Probe Table Graph 1" | table = tbl2; plotcolumninput = manual; plotcolumns = {2, 3}